x1 := 2
x2 := 3
x1^3 - 3*x1*x2 + x2^2 = -1
3*x1^2 + 4*x1*x2 + x2^3 = 63
fs(X) :=
    x1 ← X[ORIGIN + 0]
    x2 ← X[ORIGIN + 1]
    |x1^3 - 3*x1*x2 + x2^2 - (-1)| + |3*x1^2 + 4*x1*x2 + x2^3 - 63|
fs2(x1, x2) := |x1^3 - 3*x1*x2 + x2^2 - (-1)| + |3*x1^2 + 4*x1*x2 + x2^3 - 63|
|x1^3 - 3*x1*x2 + x2^2 - (-1)| + |3*x1^2 + 4*x1*x2 + x2^3 - 63| = 0
d/dx1(x1^3 - 3*x1*x2 + x2^2 - (-1) + (3*x1^2 + 4*x1*x2 + x2^3 - 63))
3*x1^2 + 6*x1 + x2
d/dx2(x1^3 - 3*x1*x2 + x2^2 - (-1) + (3*x1^2 + 4*x1*x2 + x2^3 - 63))
3*x2^2 + 2*x2 + x1
X := [x1; x2]
X = [2; 3]
x1 := -4.2246
x2 := 4.3663
X := [x1; x2]
X = [-4.2246; 4.3663]
fs(X) = 0.00480833
x1 := -3.089
x2 := 4.476
X2 := -10 .. 10
x1 := 2
x2 := 3
0
XG1 := transpose([-5, -4, -3, -2, -1, 0, 1, 2, 3, 4, 5])
x1 := 1.752
x2 := 3.162
0.261
XG2 := transpose([-5, -4, -3, -2, -1, 0, 1, 2, 3, 4, 5])
x1 := -3.089
x2 := 4.476
33.044  # Cauchee (-3, 5)
XG := [XG1; XG2]
x1 := -4.2246
x2 := 4.3663
0.027  # CoordDescent (-3, 5)
# [component: inputs fs2(XG)]
x1 := -4.2246
x2 := 4.3663
0.027  # fmin_powell (-3, 5)
x1 := 1.752
x2 := 3.162
0.261  # Cauchee (1, 2)
x1 := 3.146
x2 := 2.006
17.236  # fmin_powell (1, 2)
0.261  # Cauchee (1, 2)
x1 := 1.752
x2 := 3.162
4.065
x1 := 1.0
x2 := 3.575
# CoordDescent(1, 2)
x1 := 3.146
x2 := 2.006
17.236  # fmin_powell (1, 2)
x1 := 1.153
x2 := 3.4995
2.69  # CoordDescent(1.5, 3.5)
x1 := 1.153
x2 := 3.4995
2.69
# fmin_powell (1.5, 3.5)
