# Вариант 2
f(x1, x2) := (5 - 2*x1)^8 + (6 - 3*x2)^4
d/dx1((5 - 2*x1)^8 + (6 - 3*x2)^4)
d/dx2((5 - 2*x1)^8 + (6 - 3*x2)^4)
16*(2*x1 - 5)^7
12*(3*x2 - 6)^3
d^2/dx1^2((5 - 2*x1)^8 + (6 - 3*x2)^4)
d^2/dx2^2((5 - 2*x1)^8 + (6 - 3*x2)^4)
108*(3*x2 - 6)^2
224*(2*x1 - 5)^6
d/dx1(12*(3*x2 - 6)^3)
d/dx2(16*(2*x1 - 5)^7)
d/dx2(12*(3*x2 - 6)^3)
d/dx1(16*(2*x1 - 5)^7)
0
224*(2*x1 - 5)^6
0
108*(3*x2 - 6)^2
# Вариант 5
f(x1, x2) := (1 - x1)^2 + (2 - x2)^2 + 0.01*x1*x2
d/dx1((1 - x1)^2 + (2 - x2)^2 + 0.01*x1*x2)
d/dx2((1 - x1)^2 + (2 - x2)^2 + 0.01*x1*x2)
2*x1 + 0.01*x2 - 2
2*x2 + 0.01*x1 - 4
d/dx1(2*x2 + 0.01*x1 - 4)
d/dx2(2*x1 + 0.01*x2 - 2)
d/dx2(2*x2 + 0.01*x1 - 4)
d/dx1(2*x1 + 0.01*x2 - 2)
# 2 | 0.01 | 0.01 | 2
d^2/dx1^2((1 - x1)^2 + (2 - x2)^2 + 0.01*x1*x2)
d^2/dx2^2((1 - x1)^2 + (2 - x2)^2 + 0.01*x1*x2)
2
2
# Вариант 7
f(x1, x2) := (81 - x1)^2 - (7 - x2)^2 + 3*x2^4
d/dx1((81 - x1)^2 - (7 - x2)^2 + 3*x2^4)
d/dx2((81 - x1)^2 - (7 - x2)^2 + 3*x2^4)
2*x1 - 162
12*x2^3 - 2*x2 + 14
d/dx1(2*x1 - 162)
d/dx1(12*x2^3 - 2*x2 + 14)
d/dx2(2*x1 - 162)
d/dx2(12*x2^3 - 2*x2 + 14)
# 2 | 0 | 0
36*x2^2 - 2
d^2/dx1^2((81 - x1)^2 - (7 - x2)^2 + 3*x2^4)
d^2/dx2^2((81 - x1)^2 - (7 - x2)^2 + 3*x2^4)
2
36*x2^2 - 2
# Вариант 10
f(x1, x2) := 2*x1^2 + 4*x1*x2^3 - 10*x1*x2 + x2^3
d/dx1(2*x1^2 + 4*x1*x2^3 - 10*x1*x2 + x2^3)
d/dx2(2*x1^2 + 4*x1*x2^3 - 10*x1*x2 + x2^3)
4*x2^3 - 10*x2 + 4*x1
12*x1*x2^2 - 10*x1 + 3*x2^2
d/dx1(4*x2^3 - 10*x2 + 4*x1)
d/dx1(12*x1*x2^2 - 10*x1 + 3*x2^2)
d/dx2(4*x2^3 - 10*x2 + 4*x1)
d/dx2(12*x1*x2^2 - 10*x1 + 3*x2^2)
4
12*x2^2 - 10
6*x2 + 24*x1*x2
12*x2^2 - 10
d^2/dx1^2(2*x1^2 + 4*x1*x2^3 - 10*x1*x2 + x2^3)
d^2/dx2^2(2*x1^2 + 4*x1*x2^3 - 10*x1*x2 + x2^3)
4
6*x2 + 24*x1*x2
# Вариант 13
f(x1, x2) := 22*|x1|^7 + 24*x1^3*x2^6 - x1*x2 + x2^3
d/dx1(|x1|^7 + 24*x1^3*x2^6 - x1*x2 + x2^3)
d/dx2(|x1|^7 + 24*x1^3*x2^6 - x1*x2 + x2^3)
7*signum(x1, 0)*|x1|^6 - x2 + 72*x1^2*x2^6
144*x1^3*x2^5 - x1 + 3*x2^2
d/dx1(7*signum(x1, 0)*|x1|^6 - x2 + 72*x1^2*x2^6)
d/dx2(7*signum(x1, 0)*|x1|^6 - x2 + 72*x1^2*x2^6)
d/dx1(12*x1*x2^2 - 10*x1 + 3*x2^2)
d/dx2(12*x1*x2^2 - 10*x1 + 3*x2^2)
144*x1*x2^6 + 7*d/dx1(signum(x1, 0))*|x1|^6 + 42*signum(x1, 0)*signum(x1, 0)*|x1|^5
12*x2^2 - 10
432*x1^2*x2^5 - 1
6*x2 + 24*x1*x2
d^2/dx2^2(|x1|^7 + 24*x1^3*x2^6 - x1*x2 + x2^3)
d^2/dx1^2(|x1|^7 + 24*x1^3*x2^6 - x1*x2 + x2^3)
144*x1*x2^6 + 42*signum(x1, 0)^2*|x1|^5 + 14*Δ(x1)*|x1|^6
144*x1*x2^6 + 42*signum(x1, 0)^2*|x1|^5 + 14*Δ(x1)*|x1|^6
720*x1^3*x2^4 + 6*x2
# Вариант 13 игнорируя модуль
f(x1, x2) := 22*x1^7 + 24*x1^3*x2^6 - x1*x2 + x2^3
d/dx1(x1^7 + 24*x1^3*x2^6 - x1*x2 + x2^3)
d/dx2(x1^7 + 24*x1^3*x2^6 - x1*x2 + x2^3)
7*x1^6 + 72*x1^2*x2^6 - x2
144*x1^3*x2^5 - x1 + 3*x2^2
d/dx2(7*x1^6 + 72*x1^2*x2^6 - x2)
d/dx2(144*x1^3*x2^5 - x1 + 3*x2^2)
d/dx1(7*x1^6 + 72*x1^2*x2^6 - x2)
d/dx1(144*x1^3*x2^5 - x1 + 3*x2^2)
432*x1^2*x2^5 - 1
42*x1^5 + 144*x1*x2^6
432*x1^2*x2^5 - 1
720*x1^3*x2^4 + 6*x2
d^2/dx2^2(x1^7 + 24*x1^3*x2^6 - x1*x2 + x2^3)
d^2/dx1^2(x1^7 + 24*x1^3*x2^6 - x1*x2 + x2^3)
720*x1^3*x2^4 + 6*x2
42*x1^5 + 144*x1*x2^6
# Вариант 18
f(x1, x2) := 3 - 3.3*x1 - 1.1*x2 + 3*x1^2 + 4*x2^2
d/dx1(3 - 3.3*x1 - 1.1*x2 + 3*x1^2 + 4*x2^2)
d/dx2(3 - 3.3*x1 - 1.1*x2 + 3*x1^2 + 4*x2^2)
6*x1 - 3.3
8*x2 - 1.1
d/dx2(8*x2 - 1.1)
d/dx1(6*x1 - 3.3)
d/dx1(8*x2 - 1.1)
d/dx2(6*x1 - 3.3)
# 6 | 0 | 0 | 8
d^2/dx1^2(3 - 3.3*x1 - 1.1*x2 + 3*x1^2 + 4*x2^2)
d^2/dx2^2(3 - 3.3*x1 - 1.1*x2 + 3*x1^2 + 4*x2^2)
# 6 | 8
# Вариант 19
f(x1, x2) := (1 - x1)^2 + (2 - x2)^2 - x1^-1*x2^2
d/dx1((1 - x1)^2 + (2 - x2)^2 - x1^-1*x2^2)
d/dx2((1 - x1)^2 + (2 - x2)^2 - x1^-1*x2^2)
2*x2 - 2*x2/x1 - 4
2*x1 + x2^2/x1^2 - 2
d/dx2(2*x2 - 2*x2/x1 - 4)
d/dx1(2*x1 + x2^2/x1^2 - 2)
d/dx1(2*x2 - 2*x2/x1 - 4)
d/dx2(2*x1 + x2^2/x1^2 - 2)
2*x2/x1^2
2 - 2/x1
2 - 2*x2^2/x1^3
2*x2/x1^2
d^2/dx1^2((1 - x1)^2 + (2 - x2)^2 - x1^-1*x2^2)
d^2/dx2^2((1 - x1)^2 + (2 - x2)^2 - x1^-1*x2^2)
2 - 2*x2^2/x1^3
2 - 2/x1
# Вариант 24
f(x1, x2) := 6*x1^-2 + 2*x2^8 - 6*x1*x2 + 8*x2^4
d/dx1(6*x1^-2 + 2*x2^8 - 6*x1*x2 + 8*x2^4)
d/dx2(6*x1^-2 + 2*x2^8 - 6*x1*x2 + 8*x2^4)
-6*x2 - 12/x1^3
16*x2^7 + 32*x2^3 - 6*x1
d/dx1(-6*x2 - 12/x1^3)
d/dx1(16*x2^7 + 32*x2^3 - 6*x1)
d/dx2(-6*x2 - 12/x1^3)
d/dx2(16*x2^7 + 32*x2^3 - 6*x1)
36/x1^4
-6
112*x2^6 + 96*x2^2
-6
d^2/dx1^2(6*x1^-2 + 2*x2^8 - 6*x1*x2 + 8*x2^4)
d^2/dx2^2(6*x1^-2 + 2*x2^8 - 6*x1*x2 + 8*x2^4)
36/x1^4
112*x2^6 + 96*x2^2
# Розенброк
f(x1, x2) := (1 - x1)^2 + 100*(x2 - x1^2)^2
d/dx1((1 - x1)^2 + 100*(x2 - x1^2)^2)
d/dx2((1 - x1)^2 + 100*(x2 - x1^2)^2)
2*x1 - 400*x1*(x2 - x1^2) - 2
200*x2 - 200*x1^2
d/dx2(200*x2 - 200*x1^2)
d/dx1(2*x1 - 400*x1*(x2 - x1^2) - 2)
d/dx1(200*x2 - 200*x1^2)
d/dx2(2*x1 - 400*x1*(x2 - x1^2) - 2)
-400*x1
-400*x1
1200*x1^2 - 400*x2 + 2
200
d^2/dx2^2((1 - x1)^2 + 100*(x2 - x1^2)^2)
d^2/dx1^2((1 - x1)^2 + 100*(x2 - x1^2)^2)
1200*x1^2 - 400*x2 + 2
200
# Моя система
eqn1(x1, x2) := x1^3 - 3*x1*x2 + x2^2 + 1
eqn2(x1, x2) := x1^2 + 4*x1*x2 + x2^3 - 63
f(x1, x2) := x1^3 - 3*x1*x2 + x2^2 + 1 + x1^2 + 4*x1*x2 + x2^3 - 63
f(1, 2) = -46
f(x1, x2) := x1^3 + x1^2 + x2^2 + 1*x1*x2 + x2^3 - 62
f(1, 2) = -46
d/dx1(x1^3 + x1^2 + x2^2 + x1*x2 + x2^3 - 62)
d/dx2(x1^3 + x1^2 + x2^2 + x1*x2 + x2^3 - 62)
3*x1^2 + 2*x1 + x2
3*x2^2 + 2*x2 + x1
d/dx1(3*x2^2 + 2*x2 + x1)
d/dx2(3*x2^2 + 2*x2 + x1)
d/dx1(3*x1^2 + 2*x1 + x2)
d/dx2(3*x1^2 + 2*x1 + x2)
1
6*x1 + 2
1
6*x2 + 2
d^2/dx2^2(x1^3 + x1^2 + x2^2 + x1*x2 + x2^3 - 62)
d^2/dx1^2(x1^3 + x1^2 + x2^2 + x1*x2 + x2^3 - 62)
6*x1 + 2
6*x2 + 2
